x^(4 - 2*x)
a := 100
α + β
b := 20 + a/cos(π/3)
# [chart]
    Y := sin(x)
    X := x
ln(10)
function
a + b = 320
x := 25
A.tan(atan(C/D)) → A.tan(atan(C/D))
f(x, y) := x^3 + 2*y*tan(x/y)
5 + 4 - 8 = 1
5! = 120
|-20| = 20
-(-50) = 50
sqrt(25) = 5
5/4*8*7/2 = 35
4^(7*5) = 1.18059e21
3*3*(2 + 3) = 45
sum(2*n, n = 1 .. 5) = 30
product(3 + k, k = 1 .. 3) = 120
z := 4i
z^2 = -16
z := 4i + 2
Re(z) = 2
Im(z) = 4
arg(z) = 1.10715
ORIGIN := 1
ORIGIN = 1
C := [4, 6, 8; 3, 2, 5; 1, 6, 3]
G := [2, 6, 4; 3, 2, 6; 1, 4, 2]
|C| = 8
C^-1 = [-3, 3.75, 1.75; -0.5, 0.5, 0.5; 2, -2.25, -1.25]
transpose(C) = [4, 3, 1; 6, 2, 6; 8, 5, 3]
