A := [7.03, 1.08, 0.99, 1.135; 1.08, 3.39, 1.30, 0.16; 0.99, 1.30, 6.21, 2.10; 1.135, 0.16, 2.10, 5.33]
vals := eigenvals(A) = [9.41367; 5.94821; 4.08667; 2.51145]
# Власні значення співпадають
polynom := [574.6973443; -527.1243980; 167.6174750; -21.9600000; 1]
vals2 := polyroots(polynom) = [2.51145; 4.08667; 5.94821; 9.41367]
S := [
    0.1354178, -2.1926933, 10.3462547, -14.8276780;
    -0.0979988, 1.8806479, -11.0646652, 19.7677861;
    -0.0657235, 1.0418110, -4.2726917, 3.9697946;
    0, 0, 0, 1
]
pow(x) := [x^3; x^2; x; 1]
# Власні вектори
pow(vals[0]) = [834.213; 88.6172; 9.41367; 1]
pow(vals[1]) = [210.455; 35.3813; 5.94821; 1]
vecs2 := S*[
    834.21268, 210.45535, 68.2508, 15.84065;
    88.61717, 35.38126, 16.70085, 6.30738;
    9.41367, 5.94821, 4.08667, 2.51145;
    1, 1, 1, 1
] = [
    1.22552, -2.36683, 0.076582, -0.528621;
    0.514532, -0.131846, -0.729927, 2.28903;
    1.24305, 1.58365, -0.577839, -1.23086;
    1, 1, 1, 1
]
pow(vals[2]) = [68.2508; 16.7008; 4.08667; 1]
pow(vals[3]) = [15.8407; 6.30738; 2.51145; 1]
# Перевірка
error := A*vecs2 = [
    11.5367, -14.0784, 0.31299, -1.3276;
    4.84379, -0.784391, -2.98294, 5.74878;
    11.7015, 9.41991, -2.36147, -3.09125;
    9.4137, 5.94822, 4.08667, 2.51145
]
error[:, 0] - vecs2[:, 0]*vals[0, :] = [7.9603e-5; 0.00015502; -0.000164751; 2.74645e-5]
error[:, 2] - vecs2[:, 2]*vals[2, :] = [2.46248e-5; 3.4525e-5; -3.30878e-5; 4.19525e-6]
error[:, 1] - vecs2[:, 1]*vals[1, :] = [1.59664e-5; -0.000145075; 1.16281e-5; 2.40285e-7]
error[:, 3] - vecs2[:, 3]*vals[3, :] = [-9.95543e-7; -2.18161e-6; -2.8184e-6; 9.98447e-7]
