y(x) := x^2/15 + cos(x + 3)
p1(x) := 1.48886973812*(x - 8)*(x - 10)*(x - 12)*(x - 14)/384
p2(x) := 4.27109236465*(x - 6)*(x - 10)*(x - 12)*(x - 14)/(-96)
p3(x) := 7.57411344812*(x - 6)*(x - 8)*(x - 12)*(x - 14)/64
p4(x) := 8.84031208714*(x - 6)*(x - 8)*(x - 10)*(x - 14)/(-96)
p5(x) := 12.7915033286*(x - 6)*(x - 8)*(x - 10)*(x - 12)/384
lagrange(x) := p1(x) + p2(x) + p3(x) + p4(x) + p5(x)
# [plot: lagrange(x), y(x) vs x]
y(6) - lagrange(6) = 0
y(8) - lagrange(8) = 0
y(10) - lagrange(10) = 0
y(12) - lagrange(12) = 0
y(14) - lagrange(14) = 0
f1(x) := 1.48886973812 + 1.06777309116*(x - 6) - 0.23607159813*(x - 6)^2 + 0.198870354591*(x - 6)^3
f2(x) := 4.27109236465 + 1.36392986208*(x - 8) + 0.957150529419*(x - 8)^2 - 0.406680094797*(x - 8)^3
f3(x) := 7.57411344812 + 1.78040528357*(x - 10) - 1.48293003936*(x - 10)^2 + 0.454638528667*(x - 10)^3
f4(x) := 8.84031208714 + 0.315727443884*(x - 12) + 1.24490113264*(x - 12)^2 - 0.207483522107*(x - 12)^3
spline(z) := if(z < 8, f1(z), if(z ≥ 8 and z < 10, f2(z), if(z ≥ 10 and z < 12, f3(z), if(z ≥ 12, f4(z), 0))))
x := [6; 8; 10; 12; 14]
y := y(x) = [1.48887; 4.27109; 7.57411; 8.84031; 12.7915]
s := cspline(x, y)
A(z) := interp(s, x, y, z)
y(z) := z^2/15 + cos(z + 3)
# [plot: A(z), spline(z), y(z) vs z]
